<Lems>

    <!--

        This LEMS file has been automatically generated using PyNeuroML v0.3.5 (libNeuroML v0.2.34)

     -->

    <!-- Specify which component to run -->
    <Target component="Sim_M1"/>

    <!-- Include core NeuroML2 ComponentType definitions -->
    <Include file="Cells.xml"/>
    <Include file="Networks.xml"/>
    <Include file="Simulation.xml"/>

    <Include file="M1.net.nml"/>

    <Simulation id="Sim_M1" length="100ms" step="0.01ms" target="M1" seed="12345">  <!-- Note seed: ensures same random numbers used every run -->

        <Display id="DispPop__IT_L23" title="Membrane potentials of cells in IT_L23" timeScale="1ms" xmin="-10.0" xmax="110.0" ymin="-90" ymax="50">
            <Line id="IT_L23[0]: v" quantity="IT_L23/0/CELL_IT/v" scale="1mV" color="#32a522" timeScale="1ms"/>
            <Line id="IT_L23[1]: v" quantity="IT_L23/1/CELL_IT/v" scale="1mV" color="#6eab01" timeScale="1ms"/>
            <Line id="IT_L23[2]: v" quantity="IT_L23/2/CELL_IT/v" scale="1mV" color="#0d08c4" timeScale="1ms"/>
            <Line id="IT_L23[3]: v" quantity="IT_L23/3/CELL_IT/v" scale="1mV" color="#8bb775" timeScale="1ms"/>
            <Line id="IT_L23[4]: v" quantity="IT_L23/4/CELL_IT/v" scale="1mV" color="#e2b7ab" timeScale="1ms"/>
            <Line id="IT_L23[5]: v" quantity="IT_L23/5/CELL_IT/v" scale="1mV" color="#00c171" timeScale="1ms"/>
            <Line id="IT_L23[6]: v" quantity="IT_L23/6/CELL_IT/v" scale="1mV" color="#5fed64" timeScale="1ms"/>
            <Line id="IT_L23[7]: v" quantity="IT_L23/7/CELL_IT/v" scale="1mV" color="#bf2a37" timeScale="1ms"/>
            <Line id="IT_L23[8]: v" quantity="IT_L23/8/CELL_IT/v" scale="1mV" color="#a1c022" timeScale="1ms"/>
            <Line id="IT_L23[9]: v" quantity="IT_L23/9/CELL_IT/v" scale="1mV" color="#1adc99" timeScale="1ms"/>
            <Line id="IT_L23[10]: v" quantity="IT_L23/10/CELL_IT/v" scale="1mV" color="#4e6258" timeScale="1ms"/>
            <Line id="IT_L23[11]: v" quantity="IT_L23/11/CELL_IT/v" scale="1mV" color="#73861f" timeScale="1ms"/>
            <Line id="IT_L23[12]: v" quantity="IT_L23/12/CELL_IT/v" scale="1mV" color="#c9d3f3" timeScale="1ms"/>
            <Line id="IT_L23[13]: v" quantity="IT_L23/13/CELL_IT/v" scale="1mV" color="#82618d" timeScale="1ms"/>
            <Line id="IT_L23[14]: v" quantity="IT_L23/14/CELL_IT/v" scale="1mV" color="#6ccf60" timeScale="1ms"/>
            <Line id="IT_L23[15]: v" quantity="IT_L23/15/CELL_IT/v" scale="1mV" color="#d1286e" timeScale="1ms"/>
            <Line id="IT_L23[16]: v" quantity="IT_L23/16/CELL_IT/v" scale="1mV" color="#1be889" timeScale="1ms"/>
            <Line id="IT_L23[17]: v" quantity="IT_L23/17/CELL_IT/v" scale="1mV" color="#5bfa12" timeScale="1ms"/>
            <Line id="IT_L23[18]: v" quantity="IT_L23/18/CELL_IT/v" scale="1mV" color="#ed3f93" timeScale="1ms"/>
            <Line id="IT_L23[19]: v" quantity="IT_L23/19/CELL_IT/v" scale="1mV" color="#6cd514" timeScale="1ms"/>
            <Line id="IT_L23[20]: v" quantity="IT_L23/20/CELL_IT/v" scale="1mV" color="#429d8f" timeScale="1ms"/>
            <Line id="IT_L23[21]: v" quantity="IT_L23/21/CELL_IT/v" scale="1mV" color="#d8b6e5" timeScale="1ms"/>
            <Line id="IT_L23[22]: v" quantity="IT_L23/22/CELL_IT/v" scale="1mV" color="#0f5444" timeScale="1ms"/>
            <Line id="IT_L23[23]: v" quantity="IT_L23/23/CELL_IT/v" scale="1mV" color="#a7c293" timeScale="1ms"/>
            <Line id="IT_L23[24]: v" quantity="IT_L23/24/CELL_IT/v" scale="1mV" color="#e10fdc" timeScale="1ms"/>
            <Line id="IT_L23[25]: v" quantity="IT_L23/25/CELL_IT/v" scale="1mV" color="#78b255" timeScale="1ms"/>
            <Line id="IT_L23[26]: v" quantity="IT_L23/26/CELL_IT/v" scale="1mV" color="#3938a9" timeScale="1ms"/>
            <Line id="IT_L23[27]: v" quantity="IT_L23/27/CELL_IT/v" scale="1mV" color="#edca07" timeScale="1ms"/>
            <Line id="IT_L23[28]: v" quantity="IT_L23/28/CELL_IT/v" scale="1mV" color="#80d995" timeScale="1ms"/>
            <Line id="IT_L23[29]: v" quantity="IT_L23/29/CELL_IT/v" scale="1mV" color="#04eae6" timeScale="1ms"/>
            <Line id="IT_L23[30]: v" quantity="IT_L23/30/CELL_IT/v" scale="1mV" color="#6effa4" timeScale="1ms"/>
            <Line id="IT_L23[31]: v" quantity="IT_L23/31/CELL_IT/v" scale="1mV" color="#419e75" timeScale="1ms"/>
            <Line id="IT_L23[32]: v" quantity="IT_L23/32/CELL_IT/v" scale="1mV" color="#c3fae1" timeScale="1ms"/>
            <Line id="IT_L23[33]: v" quantity="IT_L23/33/CELL_IT/v" scale="1mV" color="#8268eb" timeScale="1ms"/>
            <Line id="IT_L23[34]: v" quantity="IT_L23/34/CELL_IT/v" scale="1mV" color="#525e34" timeScale="1ms"/>
            <Line id="IT_L23[35]: v" quantity="IT_L23/35/CELL_IT/v" scale="1mV" color="#97195d" timeScale="1ms"/>
            <Line id="IT_L23[36]: v" quantity="IT_L23/36/CELL_IT/v" scale="1mV" color="#2a2938" timeScale="1ms"/>
            <Line id="IT_L23[37]: v" quantity="IT_L23/37/CELL_IT/v" scale="1mV" color="#a81b15" timeScale="1ms"/>
            <Line id="IT_L23[38]: v" quantity="IT_L23/38/CELL_IT/v" scale="1mV" color="#c5b5ab" timeScale="1ms"/>
            <Line id="IT_L23[39]: v" quantity="IT_L23/39/CELL_IT/v" scale="1mV" color="#ef917f" timeScale="1ms"/>
            <Line id="IT_L23[40]: v" quantity="IT_L23/40/CELL_IT/v" scale="1mV" color="#c9f56d" timeScale="1ms"/>
            <Line id="IT_L23[41]: v" quantity="IT_L23/41/CELL_IT/v" scale="1mV" color="#7c82ab" timeScale="1ms"/>
            <Line id="IT_L23[42]: v" quantity="IT_L23/42/CELL_IT/v" scale="1mV" color="#1ad418" timeScale="1ms"/>
            <Line id="IT_L23[43]: v" quantity="IT_L23/43/CELL_IT/v" scale="1mV" color="#d31d61" timeScale="1ms"/>
            <Line id="IT_L23[44]: v" quantity="IT_L23/44/CELL_IT/v" scale="1mV" color="#2e4d10" timeScale="1ms"/>
            <Line id="IT_L23[45]: v" quantity="IT_L23/45/CELL_IT/v" scale="1mV" color="#d7167d" timeScale="1ms"/>
            <Line id="IT_L23[46]: v" quantity="IT_L23/46/CELL_IT/v" scale="1mV" color="#3ad717" timeScale="1ms"/>
            <Line id="IT_L23[47]: v" quantity="IT_L23/47/CELL_IT/v" scale="1mV" color="#f6de1c" timeScale="1ms"/>
            <Line id="IT_L23[48]: v" quantity="IT_L23/48/CELL_IT/v" scale="1mV" color="#9a6f8a" timeScale="1ms"/>
            <Line id="IT_L23[49]: v" quantity="IT_L23/49/CELL_IT/v" scale="1mV" color="#e3c578" timeScale="1ms"/>
            <Line id="IT_L23[50]: v" quantity="IT_L23/50/CELL_IT/v" scale="1mV" color="#476816" timeScale="1ms"/>
        </Display>

        <Display id="DispPop__IT_L4" title="Membrane potentials of cells in IT_L4" timeScale="1ms" xmin="-10.0" xmax="110.0" ymin="-90" ymax="50">
            <Line id="IT_L4[0]: v" quantity="IT_L4/0/CELL_IT/v" scale="1mV" color="#51033c" timeScale="1ms"/>
            <Line id="IT_L4[1]: v" quantity="IT_L4/1/CELL_IT/v" scale="1mV" color="#79a598" timeScale="1ms"/>
            <Line id="IT_L4[2]: v" quantity="IT_L4/2/CELL_IT/v" scale="1mV" color="#f1e9ad" timeScale="1ms"/>
            <Line id="IT_L4[3]: v" quantity="IT_L4/3/CELL_IT/v" scale="1mV" color="#80856f" timeScale="1ms"/>
            <Line id="IT_L4[4]: v" quantity="IT_L4/4/CELL_IT/v" scale="1mV" color="#5de7f8" timeScale="1ms"/>
            <Line id="IT_L4[5]: v" quantity="IT_L4/5/CELL_IT/v" scale="1mV" color="#13cedc" timeScale="1ms"/>
            <Line id="IT_L4[6]: v" quantity="IT_L4/6/CELL_IT/v" scale="1mV" color="#631ff4" timeScale="1ms"/>
            <Line id="IT_L4[7]: v" quantity="IT_L4/7/CELL_IT/v" scale="1mV" color="#9ed822" timeScale="1ms"/>
            <Line id="IT_L4[8]: v" quantity="IT_L4/8/CELL_IT/v" scale="1mV" color="#1b6740" timeScale="1ms"/>
            <Line id="IT_L4[9]: v" quantity="IT_L4/9/CELL_IT/v" scale="1mV" color="#e4eb5b" timeScale="1ms"/>
            <Line id="IT_L4[10]: v" quantity="IT_L4/10/CELL_IT/v" scale="1mV" color="#51acc7" timeScale="1ms"/>
            <Line id="IT_L4[11]: v" quantity="IT_L4/11/CELL_IT/v" scale="1mV" color="#f210b5" timeScale="1ms"/>
            <Line id="IT_L4[12]: v" quantity="IT_L4/12/CELL_IT/v" scale="1mV" color="#10232f" timeScale="1ms"/>
            <Line id="IT_L4[13]: v" quantity="IT_L4/13/CELL_IT/v" scale="1mV" color="#b5350e" timeScale="1ms"/>
            <Line id="IT_L4[14]: v" quantity="IT_L4/14/CELL_IT/v" scale="1mV" color="#5abf65" timeScale="1ms"/>
            <Line id="IT_L4[15]: v" quantity="IT_L4/15/CELL_IT/v" scale="1mV" color="#00c7af" timeScale="1ms"/>
            <Line id="IT_L4[16]: v" quantity="IT_L4/16/CELL_IT/v" scale="1mV" color="#f15043" timeScale="1ms"/>
            <Line id="IT_L4[17]: v" quantity="IT_L4/17/CELL_IT/v" scale="1mV" color="#815179" timeScale="1ms"/>
            <Line id="IT_L4[18]: v" quantity="IT_L4/18/CELL_IT/v" scale="1mV" color="#485631" timeScale="1ms"/>
            <Line id="IT_L4[19]: v" quantity="IT_L4/19/CELL_IT/v" scale="1mV" color="#5e430f" timeScale="1ms"/>
            <Line id="IT_L4[20]: v" quantity="IT_L4/20/CELL_IT/v" scale="1mV" color="#3821f2" timeScale="1ms"/>
            <Line id="IT_L4[21]: v" quantity="IT_L4/21/CELL_IT/v" scale="1mV" color="#c53538" timeScale="1ms"/>
            <Line id="IT_L4[22]: v" quantity="IT_L4/22/CELL_IT/v" scale="1mV" color="#36d720" timeScale="1ms"/>
            <Line id="IT_L4[23]: v" quantity="IT_L4/23/CELL_IT/v" scale="1mV" color="#b22450" timeScale="1ms"/>
            <Line id="IT_L4[24]: v" quantity="IT_L4/24/CELL_IT/v" scale="1mV" color="#c3ded1" timeScale="1ms"/>
            <Line id="IT_L4[25]: v" quantity="IT_L4/25/CELL_IT/v" scale="1mV" color="#9a646b" timeScale="1ms"/>
        </Display>

        <Display id="DispPop__IT_L5A" title="Membrane potentials of cells in IT_L5A" timeScale="1ms" xmin="-10.0" xmax="110.0" ymin="-90" ymax="50">
            <Line id="IT_L5A[0]: v" quantity="IT_L5A/0/CELL_IT/v" scale="1mV" color="#ad609f" timeScale="1ms"/>
            <Line id="IT_L5A[1]: v" quantity="IT_L5A/1/CELL_IT/v" scale="1mV" color="#07f3a5" timeScale="1ms"/>
            <Line id="IT_L5A[2]: v" quantity="IT_L5A/2/CELL_IT/v" scale="1mV" color="#3ba659" timeScale="1ms"/>
            <Line id="IT_L5A[3]: v" quantity="IT_L5A/3/CELL_IT/v" scale="1mV" color="#4fea2e" timeScale="1ms"/>
            <Line id="IT_L5A[4]: v" quantity="IT_L5A/4/CELL_IT/v" scale="1mV" color="#3d5d43" timeScale="1ms"/>
            <Line id="IT_L5A[5]: v" quantity="IT_L5A/5/CELL_IT/v" scale="1mV" color="#858e3f" timeScale="1ms"/>
            <Line id="IT_L5A[6]: v" quantity="IT_L5A/6/CELL_IT/v" scale="1mV" color="#8aedda" timeScale="1ms"/>
            <Line id="IT_L5A[7]: v" quantity="IT_L5A/7/CELL_IT/v" scale="1mV" color="#5da30d" timeScale="1ms"/>
            <Line id="IT_L5A[8]: v" quantity="IT_L5A/8/CELL_IT/v" scale="1mV" color="#f66e94" timeScale="1ms"/>
            <Line id="IT_L5A[9]: v" quantity="IT_L5A/9/CELL_IT/v" scale="1mV" color="#0ceafe" timeScale="1ms"/>
            <Line id="IT_L5A[10]: v" quantity="IT_L5A/10/CELL_IT/v" scale="1mV" color="#7db873" timeScale="1ms"/>
            <Line id="IT_L5A[11]: v" quantity="IT_L5A/11/CELL_IT/v" scale="1mV" color="#94c59c" timeScale="1ms"/>
            <Line id="IT_L5A[12]: v" quantity="IT_L5A/12/CELL_IT/v" scale="1mV" color="#9e4cc3" timeScale="1ms"/>
            <Line id="IT_L5A[13]: v" quantity="IT_L5A/13/CELL_IT/v" scale="1mV" color="#d6346a" timeScale="1ms"/>
            <Line id="IT_L5A[14]: v" quantity="IT_L5A/14/CELL_IT/v" scale="1mV" color="#76e867" timeScale="1ms"/>
            <Line id="IT_L5A[15]: v" quantity="IT_L5A/15/CELL_IT/v" scale="1mV" color="#297c87" timeScale="1ms"/>
            <Line id="IT_L5A[16]: v" quantity="IT_L5A/16/CELL_IT/v" scale="1mV" color="#4f6386" timeScale="1ms"/>
            <Line id="IT_L5A[17]: v" quantity="IT_L5A/17/CELL_IT/v" scale="1mV" color="#776f53" timeScale="1ms"/>
            <Line id="IT_L5A[18]: v" quantity="IT_L5A/18/CELL_IT/v" scale="1mV" color="#6e074b" timeScale="1ms"/>
            <Line id="IT_L5A[19]: v" quantity="IT_L5A/19/CELL_IT/v" scale="1mV" color="#95b685" timeScale="1ms"/>
            <Line id="IT_L5A[20]: v" quantity="IT_L5A/20/CELL_IT/v" scale="1mV" color="#d640e5" timeScale="1ms"/>
            <Line id="IT_L5A[21]: v" quantity="IT_L5A/21/CELL_IT/v" scale="1mV" color="#7c3941" timeScale="1ms"/>
            <Line id="IT_L5A[22]: v" quantity="IT_L5A/22/CELL_IT/v" scale="1mV" color="#72b161" timeScale="1ms"/>
            <Line id="IT_L5A[23]: v" quantity="IT_L5A/23/CELL_IT/v" scale="1mV" color="#d40af7" timeScale="1ms"/>
            <Line id="IT_L5A[24]: v" quantity="IT_L5A/24/CELL_IT/v" scale="1mV" color="#54d3d0" timeScale="1ms"/>
            <Line id="IT_L5A[25]: v" quantity="IT_L5A/25/CELL_IT/v" scale="1mV" color="#8a2114" timeScale="1ms"/>
            <Line id="IT_L5A[26]: v" quantity="IT_L5A/26/CELL_IT/v" scale="1mV" color="#ebf079" timeScale="1ms"/>
            <Line id="IT_L5A[27]: v" quantity="IT_L5A/27/CELL_IT/v" scale="1mV" color="#e82565" timeScale="1ms"/>
            <Line id="IT_L5A[28]: v" quantity="IT_L5A/28/CELL_IT/v" scale="1mV" color="#819869" timeScale="1ms"/>
        </Display>

        <Display id="DispPop__IT_L5B" title="Membrane potentials of cells in IT_L5B" timeScale="1ms" xmin="-10.0" xmax="110.0" ymin="-90" ymax="50">
            <Line id="IT_L5B[0]: v" quantity="IT_L5B/0/CELL_IT/v" scale="1mV" color="#dfecd9" timeScale="1ms"/>
            <Line id="IT_L5B[1]: v" quantity="IT_L5B/1/CELL_IT/v" scale="1mV" color="#e7174f" timeScale="1ms"/>
            <Line id="IT_L5B[2]: v" quantity="IT_L5B/2/CELL_IT/v" scale="1mV" color="#c83ac7" timeScale="1ms"/>
            <Line id="IT_L5B[3]: v" quantity="IT_L5B/3/CELL_IT/v" scale="1mV" color="#098f3e" timeScale="1ms"/>
            <Line id="IT_L5B[4]: v" quantity="IT_L5B/4/CELL_IT/v" scale="1mV" color="#472bbc" timeScale="1ms"/>
            <Line id="IT_L5B[5]: v" quantity="IT_L5B/5/CELL_IT/v" scale="1mV" color="#b8ff0d" timeScale="1ms"/>
            <Line id="IT_L5B[6]: v" quantity="IT_L5B/6/CELL_IT/v" scale="1mV" color="#db7922" timeScale="1ms"/>
            <Line id="IT_L5B[7]: v" quantity="IT_L5B/7/CELL_IT/v" scale="1mV" color="#419f28" timeScale="1ms"/>
            <Line id="IT_L5B[8]: v" quantity="IT_L5B/8/CELL_IT/v" scale="1mV" color="#71d52d" timeScale="1ms"/>
            <Line id="IT_L5B[9]: v" quantity="IT_L5B/9/CELL_IT/v" scale="1mV" color="#059cea" timeScale="1ms"/>
            <Line id="IT_L5B[10]: v" quantity="IT_L5B/10/CELL_IT/v" scale="1mV" color="#179fbe" timeScale="1ms"/>
            <Line id="IT_L5B[11]: v" quantity="IT_L5B/11/CELL_IT/v" scale="1mV" color="#210c09" timeScale="1ms"/>
            <Line id="IT_L5B[12]: v" quantity="IT_L5B/12/CELL_IT/v" scale="1mV" color="#acb97a" timeScale="1ms"/>
            <Line id="IT_L5B[13]: v" quantity="IT_L5B/13/CELL_IT/v" scale="1mV" color="#5fb626" timeScale="1ms"/>
            <Line id="IT_L5B[14]: v" quantity="IT_L5B/14/CELL_IT/v" scale="1mV" color="#303063" timeScale="1ms"/>
            <Line id="IT_L5B[15]: v" quantity="IT_L5B/15/CELL_IT/v" scale="1mV" color="#ac5a10" timeScale="1ms"/>
            <Line id="IT_L5B[16]: v" quantity="IT_L5B/16/CELL_IT/v" scale="1mV" color="#5c3957" timeScale="1ms"/>
            <Line id="IT_L5B[17]: v" quantity="IT_L5B/17/CELL_IT/v" scale="1mV" color="#b6ea45" timeScale="1ms"/>
            <Line id="IT_L5B[18]: v" quantity="IT_L5B/18/CELL_IT/v" scale="1mV" color="#447fd5" timeScale="1ms"/>
            <Line id="IT_L5B[19]: v" quantity="IT_L5B/19/CELL_IT/v" scale="1mV" color="#04786c" timeScale="1ms"/>
            <Line id="IT_L5B[20]: v" quantity="IT_L5B/20/CELL_IT/v" scale="1mV" color="#070ca4" timeScale="1ms"/>
            <Line id="IT_L5B[21]: v" quantity="IT_L5B/21/CELL_IT/v" scale="1mV" color="#8344bc" timeScale="1ms"/>
            <Line id="IT_L5B[22]: v" quantity="IT_L5B/22/CELL_IT/v" scale="1mV" color="#32dd82" timeScale="1ms"/>
            <Line id="IT_L5B[23]: v" quantity="IT_L5B/23/CELL_IT/v" scale="1mV" color="#985e43" timeScale="1ms"/>
            <Line id="IT_L5B[24]: v" quantity="IT_L5B/24/CELL_IT/v" scale="1mV" color="#436aa8" timeScale="1ms"/>
            <Line id="IT_L5B[25]: v" quantity="IT_L5B/25/CELL_IT/v" scale="1mV" color="#b70b24" timeScale="1ms"/>
            <Line id="IT_L5B[26]: v" quantity="IT_L5B/26/CELL_IT/v" scale="1mV" color="#68b92d" timeScale="1ms"/>
            <Line id="IT_L5B[27]: v" quantity="IT_L5B/27/CELL_IT/v" scale="1mV" color="#34d90e" timeScale="1ms"/>
            <Line id="IT_L5B[28]: v" quantity="IT_L5B/28/CELL_IT/v" scale="1mV" color="#9cb3ce" timeScale="1ms"/>
            <Line id="IT_L5B[29]: v" quantity="IT_L5B/29/CELL_IT/v" scale="1mV" color="#9bff4b" timeScale="1ms"/>
            <Line id="IT_L5B[30]: v" quantity="IT_L5B/30/CELL_IT/v" scale="1mV" color="#26efe2" timeScale="1ms"/>
            <Line id="IT_L5B[31]: v" quantity="IT_L5B/31/CELL_IT/v" scale="1mV" color="#27e104" timeScale="1ms"/>
            <Line id="IT_L5B[32]: v" quantity="IT_L5B/32/CELL_IT/v" scale="1mV" color="#85ed28" timeScale="1ms"/>
        </Display>

        <Display id="DispPop__PT_L5B" title="Membrane potentials of cells in PT_L5B" timeScale="1ms" xmin="-10.0" xmax="110.0" ymin="-90" ymax="50">
            <Line id="PT_L5B[0]: v" quantity="PT_L5B/0/CELL_PT/v" scale="1mV" color="#5bb0c6" timeScale="1ms"/>
            <Line id="PT_L5B[1]: v" quantity="PT_L5B/1/CELL_PT/v" scale="1mV" color="#86ab95" timeScale="1ms"/>
            <Line id="PT_L5B[2]: v" quantity="PT_L5B/2/CELL_PT/v" scale="1mV" color="#92b7f6" timeScale="1ms"/>
            <Line id="PT_L5B[3]: v" quantity="PT_L5B/3/CELL_PT/v" scale="1mV" color="#f51af2" timeScale="1ms"/>
            <Line id="PT_L5B[4]: v" quantity="PT_L5B/4/CELL_PT/v" scale="1mV" color="#7cb261" timeScale="1ms"/>
            <Line id="PT_L5B[5]: v" quantity="PT_L5B/5/CELL_PT/v" scale="1mV" color="#219d77" timeScale="1ms"/>
            <Line id="PT_L5B[6]: v" quantity="PT_L5B/6/CELL_PT/v" scale="1mV" color="#dbb432" timeScale="1ms"/>
            <Line id="PT_L5B[7]: v" quantity="PT_L5B/7/CELL_PT/v" scale="1mV" color="#359193" timeScale="1ms"/>
            <Line id="PT_L5B[8]: v" quantity="PT_L5B/8/CELL_PT/v" scale="1mV" color="#c5ef0f" timeScale="1ms"/>
            <Line id="PT_L5B[9]: v" quantity="PT_L5B/9/CELL_PT/v" scale="1mV" color="#92ee0e" timeScale="1ms"/>
            <Line id="PT_L5B[10]: v" quantity="PT_L5B/10/CELL_PT/v" scale="1mV" color="#156ea4" timeScale="1ms"/>
            <Line id="PT_L5B[11]: v" quantity="PT_L5B/11/CELL_PT/v" scale="1mV" color="#0ea714" timeScale="1ms"/>
            <Line id="PT_L5B[12]: v" quantity="PT_L5B/12/CELL_PT/v" scale="1mV" color="#b105c6" timeScale="1ms"/>
            <Line id="PT_L5B[13]: v" quantity="PT_L5B/13/CELL_PT/v" scale="1mV" color="#d9c6cb" timeScale="1ms"/>
            <Line id="PT_L5B[14]: v" quantity="PT_L5B/14/CELL_PT/v" scale="1mV" color="#92e836" timeScale="1ms"/>
            <Line id="PT_L5B[15]: v" quantity="PT_L5B/15/CELL_PT/v" scale="1mV" color="#45d802" timeScale="1ms"/>
            <Line id="PT_L5B[16]: v" quantity="PT_L5B/16/CELL_PT/v" scale="1mV" color="#cc2bad" timeScale="1ms"/>
            <Line id="PT_L5B[17]: v" quantity="PT_L5B/17/CELL_PT/v" scale="1mV" color="#7602b5" timeScale="1ms"/>
            <Line id="PT_L5B[18]: v" quantity="PT_L5B/18/CELL_PT/v" scale="1mV" color="#47301d" timeScale="1ms"/>
            <Line id="PT_L5B[19]: v" quantity="PT_L5B/19/CELL_PT/v" scale="1mV" color="#f7b27b" timeScale="1ms"/>
            <Line id="PT_L5B[20]: v" quantity="PT_L5B/20/CELL_PT/v" scale="1mV" color="#eb934b" timeScale="1ms"/>
            <Line id="PT_L5B[21]: v" quantity="PT_L5B/21/CELL_PT/v" scale="1mV" color="#c6e315" timeScale="1ms"/>
            <Line id="PT_L5B[22]: v" quantity="PT_L5B/22/CELL_PT/v" scale="1mV" color="#f63991" timeScale="1ms"/>
            <Line id="PT_L5B[23]: v" quantity="PT_L5B/23/CELL_PT/v" scale="1mV" color="#2ec9a9" timeScale="1ms"/>
            <Line id="PT_L5B[24]: v" quantity="PT_L5B/24/CELL_PT/v" scale="1mV" color="#b69f63" timeScale="1ms"/>
            <Line id="PT_L5B[25]: v" quantity="PT_L5B/25/CELL_PT/v" scale="1mV" color="#6e0a54" timeScale="1ms"/>
            <Line id="PT_L5B[26]: v" quantity="PT_L5B/26/CELL_PT/v" scale="1mV" color="#113279" timeScale="1ms"/>
            <Line id="PT_L5B[27]: v" quantity="PT_L5B/27/CELL_PT/v" scale="1mV" color="#641afb" timeScale="1ms"/>
            <Line id="PT_L5B[28]: v" quantity="PT_L5B/28/CELL_PT/v" scale="1mV" color="#a260c3" timeScale="1ms"/>
            <Line id="PT_L5B[29]: v" quantity="PT_L5B/29/CELL_PT/v" scale="1mV" color="#842657" timeScale="1ms"/>
            <Line id="PT_L5B[30]: v" quantity="PT_L5B/30/CELL_PT/v" scale="1mV" color="#104fd1" timeScale="1ms"/>
            <Line id="PT_L5B[31]: v" quantity="PT_L5B/31/CELL_PT/v" scale="1mV" color="#0bd2ed" timeScale="1ms"/>
            <Line id="PT_L5B[32]: v" quantity="PT_L5B/32/CELL_PT/v" scale="1mV" color="#ba1383" timeScale="1ms"/>
        </Display>

        <Display id="DispPop__IT_L6" title="Membrane potentials of cells in IT_L6" timeScale="1ms" xmin="-10.0" xmax="110.0" ymin="-90" ymax="50">
            <Line id="IT_L6[0]: v" quantity="IT_L6/0/CELL_IT/v" scale="1mV" color="#06280c" timeScale="1ms"/>
            <Line id="IT_L6[1]: v" quantity="IT_L6/1/CELL_IT/v" scale="1mV" color="#acb05c" timeScale="1ms"/>
            <Line id="IT_L6[2]: v" quantity="IT_L6/2/CELL_IT/v" scale="1mV" color="#71d1e8" timeScale="1ms"/>
            <Line id="IT_L6[3]: v" quantity="IT_L6/3/CELL_IT/v" scale="1mV" color="#425444" timeScale="1ms"/>
            <Line id="IT_L6[4]: v" quantity="IT_L6/4/CELL_IT/v" scale="1mV" color="#525732" timeScale="1ms"/>
            <Line id="IT_L6[5]: v" quantity="IT_L6/5/CELL_IT/v" scale="1mV" color="#20a79e" timeScale="1ms"/>
            <Line id="IT_L6[6]: v" quantity="IT_L6/6/CELL_IT/v" scale="1mV" color="#fcda11" timeScale="1ms"/>
            <Line id="IT_L6[7]: v" quantity="IT_L6/7/CELL_IT/v" scale="1mV" color="#c80f29" timeScale="1ms"/>
            <Line id="IT_L6[8]: v" quantity="IT_L6/8/CELL_IT/v" scale="1mV" color="#ae420e" timeScale="1ms"/>
            <Line id="IT_L6[9]: v" quantity="IT_L6/9/CELL_IT/v" scale="1mV" color="#e802b8" timeScale="1ms"/>
            <Line id="IT_L6[10]: v" quantity="IT_L6/10/CELL_IT/v" scale="1mV" color="#52e357" timeScale="1ms"/>
            <Line id="IT_L6[11]: v" quantity="IT_L6/11/CELL_IT/v" scale="1mV" color="#8073bc" timeScale="1ms"/>
            <Line id="IT_L6[12]: v" quantity="IT_L6/12/CELL_IT/v" scale="1mV" color="#06d705" timeScale="1ms"/>
            <Line id="IT_L6[13]: v" quantity="IT_L6/13/CELL_IT/v" scale="1mV" color="#afbda5" timeScale="1ms"/>
            <Line id="IT_L6[14]: v" quantity="IT_L6/14/CELL_IT/v" scale="1mV" color="#8273de" timeScale="1ms"/>
            <Line id="IT_L6[15]: v" quantity="IT_L6/15/CELL_IT/v" scale="1mV" color="#abd1b0" timeScale="1ms"/>
            <Line id="IT_L6[16]: v" quantity="IT_L6/16/CELL_IT/v" scale="1mV" color="#db8539" timeScale="1ms"/>
            <Line id="IT_L6[17]: v" quantity="IT_L6/17/CELL_IT/v" scale="1mV" color="#61d413" timeScale="1ms"/>
            <Line id="IT_L6[18]: v" quantity="IT_L6/18/CELL_IT/v" scale="1mV" color="#4bc506" timeScale="1ms"/>
            <Line id="IT_L6[19]: v" quantity="IT_L6/19/CELL_IT/v" scale="1mV" color="#56c18a" timeScale="1ms"/>
            <Line id="IT_L6[20]: v" quantity="IT_L6/20/CELL_IT/v" scale="1mV" color="#9b4ea7" timeScale="1ms"/>
            <Line id="IT_L6[21]: v" quantity="IT_L6/21/CELL_IT/v" scale="1mV" color="#20fbef" timeScale="1ms"/>
            <Line id="IT_L6[22]: v" quantity="IT_L6/22/CELL_IT/v" scale="1mV" color="#2ddecf" timeScale="1ms"/>
            <Line id="IT_L6[23]: v" quantity="IT_L6/23/CELL_IT/v" scale="1mV" color="#b72690" timeScale="1ms"/>
            <Line id="IT_L6[24]: v" quantity="IT_L6/24/CELL_IT/v" scale="1mV" color="#00d3fe" timeScale="1ms"/>
            <Line id="IT_L6[25]: v" quantity="IT_L6/25/CELL_IT/v" scale="1mV" color="#7b1f7f" timeScale="1ms"/>
            <Line id="IT_L6[26]: v" quantity="IT_L6/26/CELL_IT/v" scale="1mV" color="#b70db1" timeScale="1ms"/>
            <Line id="IT_L6[27]: v" quantity="IT_L6/27/CELL_IT/v" scale="1mV" color="#2263a5" timeScale="1ms"/>
            <Line id="IT_L6[28]: v" quantity="IT_L6/28/CELL_IT/v" scale="1mV" color="#2c4279" timeScale="1ms"/>
            <Line id="IT_L6[29]: v" quantity="IT_L6/29/CELL_IT/v" scale="1mV" color="#a2811b" timeScale="1ms"/>
            <Line id="IT_L6[30]: v" quantity="IT_L6/30/CELL_IT/v" scale="1mV" color="#6338c7" timeScale="1ms"/>
        </Display>

        <Display id="DispPop__CT_L6" title="Membrane potentials of cells in CT_L6" timeScale="1ms" xmin="-10.0" xmax="110.0" ymin="-90" ymax="50">
            <Line id="CT_L6[0]: v" quantity="CT_L6/0/CELL_CT/v" scale="1mV" color="#89194e" timeScale="1ms"/>
            <Line id="CT_L6[1]: v" quantity="CT_L6/1/CELL_CT/v" scale="1mV" color="#bfcc58" timeScale="1ms"/>
            <Line id="CT_L6[2]: v" quantity="CT_L6/2/CELL_CT/v" scale="1mV" color="#01250e" timeScale="1ms"/>
            <Line id="CT_L6[3]: v" quantity="CT_L6/3/CELL_CT/v" scale="1mV" color="#ef1175" timeScale="1ms"/>
            <Line id="CT_L6[4]: v" quantity="CT_L6/4/CELL_CT/v" scale="1mV" color="#41c2dd" timeScale="1ms"/>
            <Line id="CT_L6[5]: v" quantity="CT_L6/5/CELL_CT/v" scale="1mV" color="#883069" timeScale="1ms"/>
            <Line id="CT_L6[6]: v" quantity="CT_L6/6/CELL_CT/v" scale="1mV" color="#81594a" timeScale="1ms"/>
            <Line id="CT_L6[7]: v" quantity="CT_L6/7/CELL_CT/v" scale="1mV" color="#27150e" timeScale="1ms"/>
            <Line id="CT_L6[8]: v" quantity="CT_L6/8/CELL_CT/v" scale="1mV" color="#594d82" timeScale="1ms"/>
            <Line id="CT_L6[9]: v" quantity="CT_L6/9/CELL_CT/v" scale="1mV" color="#c6750f" timeScale="1ms"/>
            <Line id="CT_L6[10]: v" quantity="CT_L6/10/CELL_CT/v" scale="1mV" color="#1b8d06" timeScale="1ms"/>
            <Line id="CT_L6[11]: v" quantity="CT_L6/11/CELL_CT/v" scale="1mV" color="#6d2c7d" timeScale="1ms"/>
            <Line id="CT_L6[12]: v" quantity="CT_L6/12/CELL_CT/v" scale="1mV" color="#799b55" timeScale="1ms"/>
            <Line id="CT_L6[13]: v" quantity="CT_L6/13/CELL_CT/v" scale="1mV" color="#5f9b32" timeScale="1ms"/>
            <Line id="CT_L6[14]: v" quantity="CT_L6/14/CELL_CT/v" scale="1mV" color="#8f0cd2" timeScale="1ms"/>
            <Line id="CT_L6[15]: v" quantity="CT_L6/15/CELL_CT/v" scale="1mV" color="#9fb87a" timeScale="1ms"/>
            <Line id="CT_L6[16]: v" quantity="CT_L6/16/CELL_CT/v" scale="1mV" color="#34b924" timeScale="1ms"/>
            <Line id="CT_L6[17]: v" quantity="CT_L6/17/CELL_CT/v" scale="1mV" color="#d1e186" timeScale="1ms"/>
            <Line id="CT_L6[18]: v" quantity="CT_L6/18/CELL_CT/v" scale="1mV" color="#0840f8" timeScale="1ms"/>
            <Line id="CT_L6[19]: v" quantity="CT_L6/19/CELL_CT/v" scale="1mV" color="#d2191f" timeScale="1ms"/>
            <Line id="CT_L6[20]: v" quantity="CT_L6/20/CELL_CT/v" scale="1mV" color="#dfa393" timeScale="1ms"/>
            <Line id="CT_L6[21]: v" quantity="CT_L6/21/CELL_CT/v" scale="1mV" color="#154871" timeScale="1ms"/>
            <Line id="CT_L6[22]: v" quantity="CT_L6/22/CELL_CT/v" scale="1mV" color="#4dfbf0" timeScale="1ms"/>
            <Line id="CT_L6[23]: v" quantity="CT_L6/23/CELL_CT/v" scale="1mV" color="#9f1038" timeScale="1ms"/>
            <Line id="CT_L6[24]: v" quantity="CT_L6/24/CELL_CT/v" scale="1mV" color="#3a74ac" timeScale="1ms"/>
            <Line id="CT_L6[25]: v" quantity="CT_L6/25/CELL_CT/v" scale="1mV" color="#0c09d6" timeScale="1ms"/>
            <Line id="CT_L6[26]: v" quantity="CT_L6/26/CELL_CT/v" scale="1mV" color="#d206fa" timeScale="1ms"/>
            <Line id="CT_L6[27]: v" quantity="CT_L6/27/CELL_CT/v" scale="1mV" color="#a66ec8" timeScale="1ms"/>
            <Line id="CT_L6[28]: v" quantity="CT_L6/28/CELL_CT/v" scale="1mV" color="#dc73fc" timeScale="1ms"/>
            <Line id="CT_L6[29]: v" quantity="CT_L6/29/CELL_CT/v" scale="1mV" color="#4d4ac1" timeScale="1ms"/>
            <Line id="CT_L6[30]: v" quantity="CT_L6/30/CELL_CT/v" scale="1mV" color="#7d07a2" timeScale="1ms"/>
        </Display>

        <Display id="DispPop__PV_L23" title="Membrane potentials of cells in PV_L23" timeScale="1ms" xmin="-10.0" xmax="110.0" ymin="-90" ymax="50">
            <Line id="PV_L23[0]: v" quantity="PV_L23/0/CELL_PV/v" scale="1mV" color="#97075c" timeScale="1ms"/>
            <Line id="PV_L23[1]: v" quantity="PV_L23/1/CELL_PV/v" scale="1mV" color="#005b7b" timeScale="1ms"/>
            <Line id="PV_L23[2]: v" quantity="PV_L23/2/CELL_PV/v" scale="1mV" color="#1a9dc4" timeScale="1ms"/>
            <Line id="PV_L23[3]: v" quantity="PV_L23/3/CELL_PV/v" scale="1mV" color="#b64a4c" timeScale="1ms"/>
            <Line id="PV_L23[4]: v" quantity="PV_L23/4/CELL_PV/v" scale="1mV" color="#f1aad2" timeScale="1ms"/>
            <Line id="PV_L23[5]: v" quantity="PV_L23/5/CELL_PV/v" scale="1mV" color="#8ff168" timeScale="1ms"/>
            <Line id="PV_L23[6]: v" quantity="PV_L23/6/CELL_PV/v" scale="1mV" color="#dcba72" timeScale="1ms"/>
        </Display>

        <Display id="DispPop__SOM_L23" title="Membrane potentials of cells in SOM_L23" timeScale="1ms" xmin="-10.0" xmax="110.0" ymin="-90" ymax="50">
            <Line id="SOM_L23[0]: v" quantity="SOM_L23/0/CELL_SOM/v" scale="1mV" color="#c7ecd3" timeScale="1ms"/>
            <Line id="SOM_L23[1]: v" quantity="SOM_L23/1/CELL_SOM/v" scale="1mV" color="#8eaefa" timeScale="1ms"/>
            <Line id="SOM_L23[2]: v" quantity="SOM_L23/2/CELL_SOM/v" scale="1mV" color="#0f2db7" timeScale="1ms"/>
            <Line id="SOM_L23[3]: v" quantity="SOM_L23/3/CELL_SOM/v" scale="1mV" color="#756253" timeScale="1ms"/>
            <Line id="SOM_L23[4]: v" quantity="SOM_L23/4/CELL_SOM/v" scale="1mV" color="#45404f" timeScale="1ms"/>
            <Line id="SOM_L23[5]: v" quantity="SOM_L23/5/CELL_SOM/v" scale="1mV" color="#4f13ef" timeScale="1ms"/>
            <Line id="SOM_L23[6]: v" quantity="SOM_L23/6/CELL_SOM/v" scale="1mV" color="#d47943" timeScale="1ms"/>
        </Display>

        <Display id="DispPop__PV_L5" title="Membrane potentials of cells in PV_L5" timeScale="1ms" xmin="-10.0" xmax="110.0" ymin="-90" ymax="50">
            <Line id="PV_L5[0]: v" quantity="PV_L5/0/CELL_PV/v" scale="1mV" color="#dabd70" timeScale="1ms"/>
            <Line id="PV_L5[1]: v" quantity="PV_L5/1/CELL_PV/v" scale="1mV" color="#5e7d9a" timeScale="1ms"/>
            <Line id="PV_L5[2]: v" quantity="PV_L5/2/CELL_PV/v" scale="1mV" color="#ee04a2" timeScale="1ms"/>
            <Line id="PV_L5[3]: v" quantity="PV_L5/3/CELL_PV/v" scale="1mV" color="#74b3ad" timeScale="1ms"/>
            <Line id="PV_L5[4]: v" quantity="PV_L5/4/CELL_PV/v" scale="1mV" color="#6e6b0e" timeScale="1ms"/>
            <Line id="PV_L5[5]: v" quantity="PV_L5/5/CELL_PV/v" scale="1mV" color="#c7728e" timeScale="1ms"/>
            <Line id="PV_L5[6]: v" quantity="PV_L5/6/CELL_PV/v" scale="1mV" color="#741d76" timeScale="1ms"/>
            <Line id="PV_L5[7]: v" quantity="PV_L5/7/CELL_PV/v" scale="1mV" color="#d9c68b" timeScale="1ms"/>
            <Line id="PV_L5[8]: v" quantity="PV_L5/8/CELL_PV/v" scale="1mV" color="#7cbab7" timeScale="1ms"/>
            <Line id="PV_L5[9]: v" quantity="PV_L5/9/CELL_PV/v" scale="1mV" color="#e06514" timeScale="1ms"/>
            <Line id="PV_L5[10]: v" quantity="PV_L5/10/CELL_PV/v" scale="1mV" color="#f00608" timeScale="1ms"/>
            <Line id="PV_L5[11]: v" quantity="PV_L5/11/CELL_PV/v" scale="1mV" color="#c88379" timeScale="1ms"/>
            <Line id="PV_L5[12]: v" quantity="PV_L5/12/CELL_PV/v" scale="1mV" color="#4adb46" timeScale="1ms"/>
            <Line id="PV_L5[13]: v" quantity="PV_L5/13/CELL_PV/v" scale="1mV" color="#0b91f8" timeScale="1ms"/>
            <Line id="PV_L5[14]: v" quantity="PV_L5/14/CELL_PV/v" scale="1mV" color="#4416b8" timeScale="1ms"/>
        </Display>

        <Display id="DispPop__SOM_L5" title="Membrane potentials of cells in SOM_L5" timeScale="1ms" xmin="-10.0" xmax="110.0" ymin="-90" ymax="50">
            <Line id="SOM_L5[0]: v" quantity="SOM_L5/0/CELL_SOM/v" scale="1mV" color="#7851a6" timeScale="1ms"/>
            <Line id="SOM_L5[1]: v" quantity="SOM_L5/1/CELL_SOM/v" scale="1mV" color="#426fb7" timeScale="1ms"/>
            <Line id="SOM_L5[2]: v" quantity="SOM_L5/2/CELL_SOM/v" scale="1mV" color="#230e29" timeScale="1ms"/>
            <Line id="SOM_L5[3]: v" quantity="SOM_L5/3/CELL_SOM/v" scale="1mV" color="#cf4839" timeScale="1ms"/>
            <Line id="SOM_L5[4]: v" quantity="SOM_L5/4/CELL_SOM/v" scale="1mV" color="#68df9b" timeScale="1ms"/>
            <Line id="SOM_L5[5]: v" quantity="SOM_L5/5/CELL_SOM/v" scale="1mV" color="#e43c49" timeScale="1ms"/>
            <Line id="SOM_L5[6]: v" quantity="SOM_L5/6/CELL_SOM/v" scale="1mV" color="#b65bd9" timeScale="1ms"/>
            <Line id="SOM_L5[7]: v" quantity="SOM_L5/7/CELL_SOM/v" scale="1mV" color="#cb7917" timeScale="1ms"/>
            <Line id="SOM_L5[8]: v" quantity="SOM_L5/8/CELL_SOM/v" scale="1mV" color="#c333f5" timeScale="1ms"/>
            <Line id="SOM_L5[9]: v" quantity="SOM_L5/9/CELL_SOM/v" scale="1mV" color="#c8294d" timeScale="1ms"/>
            <Line id="SOM_L5[10]: v" quantity="SOM_L5/10/CELL_SOM/v" scale="1mV" color="#d83e4f" timeScale="1ms"/>
            <Line id="SOM_L5[11]: v" quantity="SOM_L5/11/CELL_SOM/v" scale="1mV" color="#6fbda8" timeScale="1ms"/>
            <Line id="SOM_L5[12]: v" quantity="SOM_L5/12/CELL_SOM/v" scale="1mV" color="#bfaaec" timeScale="1ms"/>
            <Line id="SOM_L5[13]: v" quantity="SOM_L5/13/CELL_SOM/v" scale="1mV" color="#e892da" timeScale="1ms"/>
            <Line id="SOM_L5[14]: v" quantity="SOM_L5/14/CELL_SOM/v" scale="1mV" color="#f979fe" timeScale="1ms"/>
        </Display>

        <Display id="DispPop__PV_L6" title="Membrane potentials of cells in PV_L6" timeScale="1ms" xmin="-10.0" xmax="110.0" ymin="-90" ymax="50">
            <Line id="PV_L6[0]: v" quantity="PV_L6/0/CELL_PV/v" scale="1mV" color="#6f5ec8" timeScale="1ms"/>
            <Line id="PV_L6[1]: v" quantity="PV_L6/1/CELL_PV/v" scale="1mV" color="#fef3f8" timeScale="1ms"/>
            <Line id="PV_L6[2]: v" quantity="PV_L6/2/CELL_PV/v" scale="1mV" color="#0ff15f" timeScale="1ms"/>
            <Line id="PV_L6[3]: v" quantity="PV_L6/3/CELL_PV/v" scale="1mV" color="#5eab10" timeScale="1ms"/>
            <Line id="PV_L6[4]: v" quantity="PV_L6/4/CELL_PV/v" scale="1mV" color="#7f8a85" timeScale="1ms"/>
            <Line id="PV_L6[5]: v" quantity="PV_L6/5/CELL_PV/v" scale="1mV" color="#96e4c6" timeScale="1ms"/>
            <Line id="PV_L6[6]: v" quantity="PV_L6/6/CELL_PV/v" scale="1mV" color="#d35bd7" timeScale="1ms"/>
        </Display>

        <Display id="DispPop__SOM_L6" title="Membrane potentials of cells in SOM_L6" timeScale="1ms" xmin="-10.0" xmax="110.0" ymin="-90" ymax="50">
            <Line id="SOM_L6[0]: v" quantity="SOM_L6/0/CELL_SOM/v" scale="1mV" color="#8fba8d" timeScale="1ms"/>
            <Line id="SOM_L6[1]: v" quantity="SOM_L6/1/CELL_SOM/v" scale="1mV" color="#d8349c" timeScale="1ms"/>
            <Line id="SOM_L6[2]: v" quantity="SOM_L6/2/CELL_SOM/v" scale="1mV" color="#eddeae" timeScale="1ms"/>
            <Line id="SOM_L6[3]: v" quantity="SOM_L6/3/CELL_SOM/v" scale="1mV" color="#28de72" timeScale="1ms"/>
            <Line id="SOM_L6[4]: v" quantity="SOM_L6/4/CELL_SOM/v" scale="1mV" color="#e3bf32" timeScale="1ms"/>
            <Line id="SOM_L6[5]: v" quantity="SOM_L6/5/CELL_SOM/v" scale="1mV" color="#458b0f" timeScale="1ms"/>
            <Line id="SOM_L6[6]: v" quantity="SOM_L6/6/CELL_SOM/v" scale="1mV" color="#51e13e" timeScale="1ms"/>
        </Display>

        <OutputFile id="Volts_file__IT_L23" fileName="Sim_M1.IT_L23.v.dat">
            <OutputColumn id="v_IT_L23_0_CELL_IT_v" quantity="IT_L23/0/CELL_IT/v"/>
            <OutputColumn id="v_IT_L23_1_CELL_IT_v" quantity="IT_L23/1/CELL_IT/v"/>
            <OutputColumn id="v_IT_L23_2_CELL_IT_v" quantity="IT_L23/2/CELL_IT/v"/>
            <OutputColumn id="v_IT_L23_3_CELL_IT_v" quantity="IT_L23/3/CELL_IT/v"/>
            <OutputColumn id="v_IT_L23_4_CELL_IT_v" quantity="IT_L23/4/CELL_IT/v"/>
            <OutputColumn id="v_IT_L23_5_CELL_IT_v" quantity="IT_L23/5/CELL_IT/v"/>
            <OutputColumn id="v_IT_L23_6_CELL_IT_v" quantity="IT_L23/6/CELL_IT/v"/>
            <OutputColumn id="v_IT_L23_7_CELL_IT_v" quantity="IT_L23/7/CELL_IT/v"/>
            <OutputColumn id="v_IT_L23_8_CELL_IT_v" quantity="IT_L23/8/CELL_IT/v"/>
            <OutputColumn id="v_IT_L23_9_CELL_IT_v" quantity="IT_L23/9/CELL_IT/v"/>
            <OutputColumn id="v_IT_L23_10_CELL_IT_v" quantity="IT_L23/10/CELL_IT/v"/>
            <OutputColumn id="v_IT_L23_11_CELL_IT_v" quantity="IT_L23/11/CELL_IT/v"/>
            <OutputColumn id="v_IT_L23_12_CELL_IT_v" quantity="IT_L23/12/CELL_IT/v"/>
            <OutputColumn id="v_IT_L23_13_CELL_IT_v" quantity="IT_L23/13/CELL_IT/v"/>
            <OutputColumn id="v_IT_L23_14_CELL_IT_v" quantity="IT_L23/14/CELL_IT/v"/>
            <OutputColumn id="v_IT_L23_15_CELL_IT_v" quantity="IT_L23/15/CELL_IT/v"/>
            <OutputColumn id="v_IT_L23_16_CELL_IT_v" quantity="IT_L23/16/CELL_IT/v"/>
            <OutputColumn id="v_IT_L23_17_CELL_IT_v" quantity="IT_L23/17/CELL_IT/v"/>
            <OutputColumn id="v_IT_L23_18_CELL_IT_v" quantity="IT_L23/18/CELL_IT/v"/>
            <OutputColumn id="v_IT_L23_19_CELL_IT_v" quantity="IT_L23/19/CELL_IT/v"/>
            <OutputColumn id="v_IT_L23_20_CELL_IT_v" quantity="IT_L23/20/CELL_IT/v"/>
            <OutputColumn id="v_IT_L23_21_CELL_IT_v" quantity="IT_L23/21/CELL_IT/v"/>
            <OutputColumn id="v_IT_L23_22_CELL_IT_v" quantity="IT_L23/22/CELL_IT/v"/>
            <OutputColumn id="v_IT_L23_23_CELL_IT_v" quantity="IT_L23/23/CELL_IT/v"/>
            <OutputColumn id="v_IT_L23_24_CELL_IT_v" quantity="IT_L23/24/CELL_IT/v"/>
            <OutputColumn id="v_IT_L23_25_CELL_IT_v" quantity="IT_L23/25/CELL_IT/v"/>
            <OutputColumn id="v_IT_L23_26_CELL_IT_v" quantity="IT_L23/26/CELL_IT/v"/>
            <OutputColumn id="v_IT_L23_27_CELL_IT_v" quantity="IT_L23/27/CELL_IT/v"/>
            <OutputColumn id="v_IT_L23_28_CELL_IT_v" quantity="IT_L23/28/CELL_IT/v"/>
            <OutputColumn id="v_IT_L23_29_CELL_IT_v" quantity="IT_L23/29/CELL_IT/v"/>
            <OutputColumn id="v_IT_L23_30_CELL_IT_v" quantity="IT_L23/30/CELL_IT/v"/>
            <OutputColumn id="v_IT_L23_31_CELL_IT_v" quantity="IT_L23/31/CELL_IT/v"/>
            <OutputColumn id="v_IT_L23_32_CELL_IT_v" quantity="IT_L23/32/CELL_IT/v"/>
            <OutputColumn id="v_IT_L23_33_CELL_IT_v" quantity="IT_L23/33/CELL_IT/v"/>
            <OutputColumn id="v_IT_L23_34_CELL_IT_v" quantity="IT_L23/34/CELL_IT/v"/>
            <OutputColumn id="v_IT_L23_35_CELL_IT_v" quantity="IT_L23/35/CELL_IT/v"/>
            <OutputColumn id="v_IT_L23_36_CELL_IT_v" quantity="IT_L23/36/CELL_IT/v"/>
            <OutputColumn id="v_IT_L23_37_CELL_IT_v" quantity="IT_L23/37/CELL_IT/v"/>
            <OutputColumn id="v_IT_L23_38_CELL_IT_v" quantity="IT_L23/38/CELL_IT/v"/>
            <OutputColumn id="v_IT_L23_39_CELL_IT_v" quantity="IT_L23/39/CELL_IT/v"/>
            <OutputColumn id="v_IT_L23_40_CELL_IT_v" quantity="IT_L23/40/CELL_IT/v"/>
            <OutputColumn id="v_IT_L23_41_CELL_IT_v" quantity="IT_L23/41/CELL_IT/v"/>
            <OutputColumn id="v_IT_L23_42_CELL_IT_v" quantity="IT_L23/42/CELL_IT/v"/>
            <OutputColumn id="v_IT_L23_43_CELL_IT_v" quantity="IT_L23/43/CELL_IT/v"/>
            <OutputColumn id="v_IT_L23_44_CELL_IT_v" quantity="IT_L23/44/CELL_IT/v"/>
            <OutputColumn id="v_IT_L23_45_CELL_IT_v" quantity="IT_L23/45/CELL_IT/v"/>
            <OutputColumn id="v_IT_L23_46_CELL_IT_v" quantity="IT_L23/46/CELL_IT/v"/>
            <OutputColumn id="v_IT_L23_47_CELL_IT_v" quantity="IT_L23/47/CELL_IT/v"/>
            <OutputColumn id="v_IT_L23_48_CELL_IT_v" quantity="IT_L23/48/CELL_IT/v"/>
            <OutputColumn id="v_IT_L23_49_CELL_IT_v" quantity="IT_L23/49/CELL_IT/v"/>
            <OutputColumn id="v_IT_L23_50_CELL_IT_v" quantity="IT_L23/50/CELL_IT/v"/>
        </OutputFile>

        <OutputFile id="Volts_file__IT_L4" fileName="Sim_M1.IT_L4.v.dat">
            <OutputColumn id="v_IT_L4_0_CELL_IT_v" quantity="IT_L4/0/CELL_IT/v"/>
            <OutputColumn id="v_IT_L4_1_CELL_IT_v" quantity="IT_L4/1/CELL_IT/v"/>
            <OutputColumn id="v_IT_L4_2_CELL_IT_v" quantity="IT_L4/2/CELL_IT/v"/>
            <OutputColumn id="v_IT_L4_3_CELL_IT_v" quantity="IT_L4/3/CELL_IT/v"/>
            <OutputColumn id="v_IT_L4_4_CELL_IT_v" quantity="IT_L4/4/CELL_IT/v"/>
            <OutputColumn id="v_IT_L4_5_CELL_IT_v" quantity="IT_L4/5/CELL_IT/v"/>
            <OutputColumn id="v_IT_L4_6_CELL_IT_v" quantity="IT_L4/6/CELL_IT/v"/>
            <OutputColumn id="v_IT_L4_7_CELL_IT_v" quantity="IT_L4/7/CELL_IT/v"/>
            <OutputColumn id="v_IT_L4_8_CELL_IT_v" quantity="IT_L4/8/CELL_IT/v"/>
            <OutputColumn id="v_IT_L4_9_CELL_IT_v" quantity="IT_L4/9/CELL_IT/v"/>
            <OutputColumn id="v_IT_L4_10_CELL_IT_v" quantity="IT_L4/10/CELL_IT/v"/>
            <OutputColumn id="v_IT_L4_11_CELL_IT_v" quantity="IT_L4/11/CELL_IT/v"/>
            <OutputColumn id="v_IT_L4_12_CELL_IT_v" quantity="IT_L4/12/CELL_IT/v"/>
            <OutputColumn id="v_IT_L4_13_CELL_IT_v" quantity="IT_L4/13/CELL_IT/v"/>
            <OutputColumn id="v_IT_L4_14_CELL_IT_v" quantity="IT_L4/14/CELL_IT/v"/>
            <OutputColumn id="v_IT_L4_15_CELL_IT_v" quantity="IT_L4/15/CELL_IT/v"/>
            <OutputColumn id="v_IT_L4_16_CELL_IT_v" quantity="IT_L4/16/CELL_IT/v"/>
            <OutputColumn id="v_IT_L4_17_CELL_IT_v" quantity="IT_L4/17/CELL_IT/v"/>
            <OutputColumn id="v_IT_L4_18_CELL_IT_v" quantity="IT_L4/18/CELL_IT/v"/>
            <OutputColumn id="v_IT_L4_19_CELL_IT_v" quantity="IT_L4/19/CELL_IT/v"/>
            <OutputColumn id="v_IT_L4_20_CELL_IT_v" quantity="IT_L4/20/CELL_IT/v"/>
            <OutputColumn id="v_IT_L4_21_CELL_IT_v" quantity="IT_L4/21/CELL_IT/v"/>
            <OutputColumn id="v_IT_L4_22_CELL_IT_v" quantity="IT_L4/22/CELL_IT/v"/>
            <OutputColumn id="v_IT_L4_23_CELL_IT_v" quantity="IT_L4/23/CELL_IT/v"/>
            <OutputColumn id="v_IT_L4_24_CELL_IT_v" quantity="IT_L4/24/CELL_IT/v"/>
            <OutputColumn id="v_IT_L4_25_CELL_IT_v" quantity="IT_L4/25/CELL_IT/v"/>
        </OutputFile>

        <OutputFile id="Volts_file__IT_L5A" fileName="Sim_M1.IT_L5A.v.dat">
            <OutputColumn id="v_IT_L5A_0_CELL_IT_v" quantity="IT_L5A/0/CELL_IT/v"/>
            <OutputColumn id="v_IT_L5A_1_CELL_IT_v" quantity="IT_L5A/1/CELL_IT/v"/>
            <OutputColumn id="v_IT_L5A_2_CELL_IT_v" quantity="IT_L5A/2/CELL_IT/v"/>
            <OutputColumn id="v_IT_L5A_3_CELL_IT_v" quantity="IT_L5A/3/CELL_IT/v"/>
            <OutputColumn id="v_IT_L5A_4_CELL_IT_v" quantity="IT_L5A/4/CELL_IT/v"/>
            <OutputColumn id="v_IT_L5A_5_CELL_IT_v" quantity="IT_L5A/5/CELL_IT/v"/>
            <OutputColumn id="v_IT_L5A_6_CELL_IT_v" quantity="IT_L5A/6/CELL_IT/v"/>
            <OutputColumn id="v_IT_L5A_7_CELL_IT_v" quantity="IT_L5A/7/CELL_IT/v"/>
            <OutputColumn id="v_IT_L5A_8_CELL_IT_v" quantity="IT_L5A/8/CELL_IT/v"/>
            <OutputColumn id="v_IT_L5A_9_CELL_IT_v" quantity="IT_L5A/9/CELL_IT/v"/>
            <OutputColumn id="v_IT_L5A_10_CELL_IT_v" quantity="IT_L5A/10/CELL_IT/v"/>
            <OutputColumn id="v_IT_L5A_11_CELL_IT_v" quantity="IT_L5A/11/CELL_IT/v"/>
            <OutputColumn id="v_IT_L5A_12_CELL_IT_v" quantity="IT_L5A/12/CELL_IT/v"/>
            <OutputColumn id="v_IT_L5A_13_CELL_IT_v" quantity="IT_L5A/13/CELL_IT/v"/>
            <OutputColumn id="v_IT_L5A_14_CELL_IT_v" quantity="IT_L5A/14/CELL_IT/v"/>
            <OutputColumn id="v_IT_L5A_15_CELL_IT_v" quantity="IT_L5A/15/CELL_IT/v"/>
            <OutputColumn id="v_IT_L5A_16_CELL_IT_v" quantity="IT_L5A/16/CELL_IT/v"/>
            <OutputColumn id="v_IT_L5A_17_CELL_IT_v" quantity="IT_L5A/17/CELL_IT/v"/>
            <OutputColumn id="v_IT_L5A_18_CELL_IT_v" quantity="IT_L5A/18/CELL_IT/v"/>
            <OutputColumn id="v_IT_L5A_19_CELL_IT_v" quantity="IT_L5A/19/CELL_IT/v"/>
            <OutputColumn id="v_IT_L5A_20_CELL_IT_v" quantity="IT_L5A/20/CELL_IT/v"/>
            <OutputColumn id="v_IT_L5A_21_CELL_IT_v" quantity="IT_L5A/21/CELL_IT/v"/>
            <OutputColumn id="v_IT_L5A_22_CELL_IT_v" quantity="IT_L5A/22/CELL_IT/v"/>
            <OutputColumn id="v_IT_L5A_23_CELL_IT_v" quantity="IT_L5A/23/CELL_IT/v"/>
            <OutputColumn id="v_IT_L5A_24_CELL_IT_v" quantity="IT_L5A/24/CELL_IT/v"/>
            <OutputColumn id="v_IT_L5A_25_CELL_IT_v" quantity="IT_L5A/25/CELL_IT/v"/>
            <OutputColumn id="v_IT_L5A_26_CELL_IT_v" quantity="IT_L5A/26/CELL_IT/v"/>
            <OutputColumn id="v_IT_L5A_27_CELL_IT_v" quantity="IT_L5A/27/CELL_IT/v"/>
            <OutputColumn id="v_IT_L5A_28_CELL_IT_v" quantity="IT_L5A/28/CELL_IT/v"/>
        </OutputFile>

        <OutputFile id="Volts_file__IT_L5B" fileName="Sim_M1.IT_L5B.v.dat">
            <OutputColumn id="v_IT_L5B_0_CELL_IT_v" quantity="IT_L5B/0/CELL_IT/v"/>
            <OutputColumn id="v_IT_L5B_1_CELL_IT_v" quantity="IT_L5B/1/CELL_IT/v"/>
            <OutputColumn id="v_IT_L5B_2_CELL_IT_v" quantity="IT_L5B/2/CELL_IT/v"/>
            <OutputColumn id="v_IT_L5B_3_CELL_IT_v" quantity="IT_L5B/3/CELL_IT/v"/>
            <OutputColumn id="v_IT_L5B_4_CELL_IT_v" quantity="IT_L5B/4/CELL_IT/v"/>
            <OutputColumn id="v_IT_L5B_5_CELL_IT_v" quantity="IT_L5B/5/CELL_IT/v"/>
            <OutputColumn id="v_IT_L5B_6_CELL_IT_v" quantity="IT_L5B/6/CELL_IT/v"/>
            <OutputColumn id="v_IT_L5B_7_CELL_IT_v" quantity="IT_L5B/7/CELL_IT/v"/>
            <OutputColumn id="v_IT_L5B_8_CELL_IT_v" quantity="IT_L5B/8/CELL_IT/v"/>
            <OutputColumn id="v_IT_L5B_9_CELL_IT_v" quantity="IT_L5B/9/CELL_IT/v"/>
            <OutputColumn id="v_IT_L5B_10_CELL_IT_v" quantity="IT_L5B/10/CELL_IT/v"/>
            <OutputColumn id="v_IT_L5B_11_CELL_IT_v" quantity="IT_L5B/11/CELL_IT/v"/>
            <OutputColumn id="v_IT_L5B_12_CELL_IT_v" quantity="IT_L5B/12/CELL_IT/v"/>
            <OutputColumn id="v_IT_L5B_13_CELL_IT_v" quantity="IT_L5B/13/CELL_IT/v"/>
            <OutputColumn id="v_IT_L5B_14_CELL_IT_v" quantity="IT_L5B/14/CELL_IT/v"/>
            <OutputColumn id="v_IT_L5B_15_CELL_IT_v" quantity="IT_L5B/15/CELL_IT/v"/>
            <OutputColumn id="v_IT_L5B_16_CELL_IT_v" quantity="IT_L5B/16/CELL_IT/v"/>
            <OutputColumn id="v_IT_L5B_17_CELL_IT_v" quantity="IT_L5B/17/CELL_IT/v"/>
            <OutputColumn id="v_IT_L5B_18_CELL_IT_v" quantity="IT_L5B/18/CELL_IT/v"/>
            <OutputColumn id="v_IT_L5B_19_CELL_IT_v" quantity="IT_L5B/19/CELL_IT/v"/>
            <OutputColumn id="v_IT_L5B_20_CELL_IT_v" quantity="IT_L5B/20/CELL_IT/v"/>
            <OutputColumn id="v_IT_L5B_21_CELL_IT_v" quantity="IT_L5B/21/CELL_IT/v"/>
            <OutputColumn id="v_IT_L5B_22_CELL_IT_v" quantity="IT_L5B/22/CELL_IT/v"/>
            <OutputColumn id="v_IT_L5B_23_CELL_IT_v" quantity="IT_L5B/23/CELL_IT/v"/>
            <OutputColumn id="v_IT_L5B_24_CELL_IT_v" quantity="IT_L5B/24/CELL_IT/v"/>
            <OutputColumn id="v_IT_L5B_25_CELL_IT_v" quantity="IT_L5B/25/CELL_IT/v"/>
            <OutputColumn id="v_IT_L5B_26_CELL_IT_v" quantity="IT_L5B/26/CELL_IT/v"/>
            <OutputColumn id="v_IT_L5B_27_CELL_IT_v" quantity="IT_L5B/27/CELL_IT/v"/>
            <OutputColumn id="v_IT_L5B_28_CELL_IT_v" quantity="IT_L5B/28/CELL_IT/v"/>
            <OutputColumn id="v_IT_L5B_29_CELL_IT_v" quantity="IT_L5B/29/CELL_IT/v"/>
            <OutputColumn id="v_IT_L5B_30_CELL_IT_v" quantity="IT_L5B/30/CELL_IT/v"/>
            <OutputColumn id="v_IT_L5B_31_CELL_IT_v" quantity="IT_L5B/31/CELL_IT/v"/>
            <OutputColumn id="v_IT_L5B_32_CELL_IT_v" quantity="IT_L5B/32/CELL_IT/v"/>
        </OutputFile>

        <OutputFile id="Volts_file__PT_L5B" fileName="Sim_M1.PT_L5B.v.dat">
            <OutputColumn id="v_PT_L5B_0_CELL_PT_v" quantity="PT_L5B/0/CELL_PT/v"/>
            <OutputColumn id="v_PT_L5B_1_CELL_PT_v" quantity="PT_L5B/1/CELL_PT/v"/>
            <OutputColumn id="v_PT_L5B_2_CELL_PT_v" quantity="PT_L5B/2/CELL_PT/v"/>
            <OutputColumn id="v_PT_L5B_3_CELL_PT_v" quantity="PT_L5B/3/CELL_PT/v"/>
            <OutputColumn id="v_PT_L5B_4_CELL_PT_v" quantity="PT_L5B/4/CELL_PT/v"/>
            <OutputColumn id="v_PT_L5B_5_CELL_PT_v" quantity="PT_L5B/5/CELL_PT/v"/>
            <OutputColumn id="v_PT_L5B_6_CELL_PT_v" quantity="PT_L5B/6/CELL_PT/v"/>
            <OutputColumn id="v_PT_L5B_7_CELL_PT_v" quantity="PT_L5B/7/CELL_PT/v"/>
            <OutputColumn id="v_PT_L5B_8_CELL_PT_v" quantity="PT_L5B/8/CELL_PT/v"/>
            <OutputColumn id="v_PT_L5B_9_CELL_PT_v" quantity="PT_L5B/9/CELL_PT/v"/>
            <OutputColumn id="v_PT_L5B_10_CELL_PT_v" quantity="PT_L5B/10/CELL_PT/v"/>
            <OutputColumn id="v_PT_L5B_11_CELL_PT_v" quantity="PT_L5B/11/CELL_PT/v"/>
            <OutputColumn id="v_PT_L5B_12_CELL_PT_v" quantity="PT_L5B/12/CELL_PT/v"/>
            <OutputColumn id="v_PT_L5B_13_CELL_PT_v" quantity="PT_L5B/13/CELL_PT/v"/>
            <OutputColumn id="v_PT_L5B_14_CELL_PT_v" quantity="PT_L5B/14/CELL_PT/v"/>
            <OutputColumn id="v_PT_L5B_15_CELL_PT_v" quantity="PT_L5B/15/CELL_PT/v"/>
            <OutputColumn id="v_PT_L5B_16_CELL_PT_v" quantity="PT_L5B/16/CELL_PT/v"/>
            <OutputColumn id="v_PT_L5B_17_CELL_PT_v" quantity="PT_L5B/17/CELL_PT/v"/>
            <OutputColumn id="v_PT_L5B_18_CELL_PT_v" quantity="PT_L5B/18/CELL_PT/v"/>
            <OutputColumn id="v_PT_L5B_19_CELL_PT_v" quantity="PT_L5B/19/CELL_PT/v"/>
            <OutputColumn id="v_PT_L5B_20_CELL_PT_v" quantity="PT_L5B/20/CELL_PT/v"/>
            <OutputColumn id="v_PT_L5B_21_CELL_PT_v" quantity="PT_L5B/21/CELL_PT/v"/>
            <OutputColumn id="v_PT_L5B_22_CELL_PT_v" quantity="PT_L5B/22/CELL_PT/v"/>
            <OutputColumn id="v_PT_L5B_23_CELL_PT_v" quantity="PT_L5B/23/CELL_PT/v"/>
            <OutputColumn id="v_PT_L5B_24_CELL_PT_v" quantity="PT_L5B/24/CELL_PT/v"/>
            <OutputColumn id="v_PT_L5B_25_CELL_PT_v" quantity="PT_L5B/25/CELL_PT/v"/>
            <OutputColumn id="v_PT_L5B_26_CELL_PT_v" quantity="PT_L5B/26/CELL_PT/v"/>
            <OutputColumn id="v_PT_L5B_27_CELL_PT_v" quantity="PT_L5B/27/CELL_PT/v"/>
            <OutputColumn id="v_PT_L5B_28_CELL_PT_v" quantity="PT_L5B/28/CELL_PT/v"/>
            <OutputColumn id="v_PT_L5B_29_CELL_PT_v" quantity="PT_L5B/29/CELL_PT/v"/>
            <OutputColumn id="v_PT_L5B_30_CELL_PT_v" quantity="PT_L5B/30/CELL_PT/v"/>
            <OutputColumn id="v_PT_L5B_31_CELL_PT_v" quantity="PT_L5B/31/CELL_PT/v"/>
            <OutputColumn id="v_PT_L5B_32_CELL_PT_v" quantity="PT_L5B/32/CELL_PT/v"/>
        </OutputFile>

        <OutputFile id="Volts_file__IT_L6" fileName="Sim_M1.IT_L6.v.dat">
            <OutputColumn id="v_IT_L6_0_CELL_IT_v" quantity="IT_L6/0/CELL_IT/v"/>
            <OutputColumn id="v_IT_L6_1_CELL_IT_v" quantity="IT_L6/1/CELL_IT/v"/>
            <OutputColumn id="v_IT_L6_2_CELL_IT_v" quantity="IT_L6/2/CELL_IT/v"/>
            <OutputColumn id="v_IT_L6_3_CELL_IT_v" quantity="IT_L6/3/CELL_IT/v"/>
            <OutputColumn id="v_IT_L6_4_CELL_IT_v" quantity="IT_L6/4/CELL_IT/v"/>
            <OutputColumn id="v_IT_L6_5_CELL_IT_v" quantity="IT_L6/5/CELL_IT/v"/>
            <OutputColumn id="v_IT_L6_6_CELL_IT_v" quantity="IT_L6/6/CELL_IT/v"/>
            <OutputColumn id="v_IT_L6_7_CELL_IT_v" quantity="IT_L6/7/CELL_IT/v"/>
            <OutputColumn id="v_IT_L6_8_CELL_IT_v" quantity="IT_L6/8/CELL_IT/v"/>
            <OutputColumn id="v_IT_L6_9_CELL_IT_v" quantity="IT_L6/9/CELL_IT/v"/>
            <OutputColumn id="v_IT_L6_10_CELL_IT_v" quantity="IT_L6/10/CELL_IT/v"/>
            <OutputColumn id="v_IT_L6_11_CELL_IT_v" quantity="IT_L6/11/CELL_IT/v"/>
            <OutputColumn id="v_IT_L6_12_CELL_IT_v" quantity="IT_L6/12/CELL_IT/v"/>
            <OutputColumn id="v_IT_L6_13_CELL_IT_v" quantity="IT_L6/13/CELL_IT/v"/>
            <OutputColumn id="v_IT_L6_14_CELL_IT_v" quantity="IT_L6/14/CELL_IT/v"/>
            <OutputColumn id="v_IT_L6_15_CELL_IT_v" quantity="IT_L6/15/CELL_IT/v"/>
            <OutputColumn id="v_IT_L6_16_CELL_IT_v" quantity="IT_L6/16/CELL_IT/v"/>
            <OutputColumn id="v_IT_L6_17_CELL_IT_v" quantity="IT_L6/17/CELL_IT/v"/>
            <OutputColumn id="v_IT_L6_18_CELL_IT_v" quantity="IT_L6/18/CELL_IT/v"/>
            <OutputColumn id="v_IT_L6_19_CELL_IT_v" quantity="IT_L6/19/CELL_IT/v"/>
            <OutputColumn id="v_IT_L6_20_CELL_IT_v" quantity="IT_L6/20/CELL_IT/v"/>
            <OutputColumn id="v_IT_L6_21_CELL_IT_v" quantity="IT_L6/21/CELL_IT/v"/>
            <OutputColumn id="v_IT_L6_22_CELL_IT_v" quantity="IT_L6/22/CELL_IT/v"/>
            <OutputColumn id="v_IT_L6_23_CELL_IT_v" quantity="IT_L6/23/CELL_IT/v"/>
            <OutputColumn id="v_IT_L6_24_CELL_IT_v" quantity="IT_L6/24/CELL_IT/v"/>
            <OutputColumn id="v_IT_L6_25_CELL_IT_v" quantity="IT_L6/25/CELL_IT/v"/>
            <OutputColumn id="v_IT_L6_26_CELL_IT_v" quantity="IT_L6/26/CELL_IT/v"/>
            <OutputColumn id="v_IT_L6_27_CELL_IT_v" quantity="IT_L6/27/CELL_IT/v"/>
            <OutputColumn id="v_IT_L6_28_CELL_IT_v" quantity="IT_L6/28/CELL_IT/v"/>
            <OutputColumn id="v_IT_L6_29_CELL_IT_v" quantity="IT_L6/29/CELL_IT/v"/>
            <OutputColumn id="v_IT_L6_30_CELL_IT_v" quantity="IT_L6/30/CELL_IT/v"/>
        </OutputFile>

        <OutputFile id="Volts_file__CT_L6" fileName="Sim_M1.CT_L6.v.dat">
            <OutputColumn id="v_CT_L6_0_CELL_CT_v" quantity="CT_L6/0/CELL_CT/v"/>
            <OutputColumn id="v_CT_L6_1_CELL_CT_v" quantity="CT_L6/1/CELL_CT/v"/>
            <OutputColumn id="v_CT_L6_2_CELL_CT_v" quantity="CT_L6/2/CELL_CT/v"/>
            <OutputColumn id="v_CT_L6_3_CELL_CT_v" quantity="CT_L6/3/CELL_CT/v"/>
            <OutputColumn id="v_CT_L6_4_CELL_CT_v" quantity="CT_L6/4/CELL_CT/v"/>
            <OutputColumn id="v_CT_L6_5_CELL_CT_v" quantity="CT_L6/5/CELL_CT/v"/>
            <OutputColumn id="v_CT_L6_6_CELL_CT_v" quantity="CT_L6/6/CELL_CT/v"/>
            <OutputColumn id="v_CT_L6_7_CELL_CT_v" quantity="CT_L6/7/CELL_CT/v"/>
            <OutputColumn id="v_CT_L6_8_CELL_CT_v" quantity="CT_L6/8/CELL_CT/v"/>
            <OutputColumn id="v_CT_L6_9_CELL_CT_v" quantity="CT_L6/9/CELL_CT/v"/>
            <OutputColumn id="v_CT_L6_10_CELL_CT_v" quantity="CT_L6/10/CELL_CT/v"/>
            <OutputColumn id="v_CT_L6_11_CELL_CT_v" quantity="CT_L6/11/CELL_CT/v"/>
            <OutputColumn id="v_CT_L6_12_CELL_CT_v" quantity="CT_L6/12/CELL_CT/v"/>
            <OutputColumn id="v_CT_L6_13_CELL_CT_v" quantity="CT_L6/13/CELL_CT/v"/>
            <OutputColumn id="v_CT_L6_14_CELL_CT_v" quantity="CT_L6/14/CELL_CT/v"/>
            <OutputColumn id="v_CT_L6_15_CELL_CT_v" quantity="CT_L6/15/CELL_CT/v"/>
            <OutputColumn id="v_CT_L6_16_CELL_CT_v" quantity="CT_L6/16/CELL_CT/v"/>
            <OutputColumn id="v_CT_L6_17_CELL_CT_v" quantity="CT_L6/17/CELL_CT/v"/>
            <OutputColumn id="v_CT_L6_18_CELL_CT_v" quantity="CT_L6/18/CELL_CT/v"/>
            <OutputColumn id="v_CT_L6_19_CELL_CT_v" quantity="CT_L6/19/CELL_CT/v"/>
            <OutputColumn id="v_CT_L6_20_CELL_CT_v" quantity="CT_L6/20/CELL_CT/v"/>
            <OutputColumn id="v_CT_L6_21_CELL_CT_v" quantity="CT_L6/21/CELL_CT/v"/>
            <OutputColumn id="v_CT_L6_22_CELL_CT_v" quantity="CT_L6/22/CELL_CT/v"/>
            <OutputColumn id="v_CT_L6_23_CELL_CT_v" quantity="CT_L6/23/CELL_CT/v"/>
            <OutputColumn id="v_CT_L6_24_CELL_CT_v" quantity="CT_L6/24/CELL_CT/v"/>
            <OutputColumn id="v_CT_L6_25_CELL_CT_v" quantity="CT_L6/25/CELL_CT/v"/>
            <OutputColumn id="v_CT_L6_26_CELL_CT_v" quantity="CT_L6/26/CELL_CT/v"/>
            <OutputColumn id="v_CT_L6_27_CELL_CT_v" quantity="CT_L6/27/CELL_CT/v"/>
            <OutputColumn id="v_CT_L6_28_CELL_CT_v" quantity="CT_L6/28/CELL_CT/v"/>
            <OutputColumn id="v_CT_L6_29_CELL_CT_v" quantity="CT_L6/29/CELL_CT/v"/>
            <OutputColumn id="v_CT_L6_30_CELL_CT_v" quantity="CT_L6/30/CELL_CT/v"/>
        </OutputFile>

        <OutputFile id="Volts_file__PV_L23" fileName="Sim_M1.PV_L23.v.dat">
            <OutputColumn id="v_PV_L23_0_CELL_PV_v" quantity="PV_L23/0/CELL_PV/v"/>
            <OutputColumn id="v_PV_L23_1_CELL_PV_v" quantity="PV_L23/1/CELL_PV/v"/>
            <OutputColumn id="v_PV_L23_2_CELL_PV_v" quantity="PV_L23/2/CELL_PV/v"/>
            <OutputColumn id="v_PV_L23_3_CELL_PV_v" quantity="PV_L23/3/CELL_PV/v"/>
            <OutputColumn id="v_PV_L23_4_CELL_PV_v" quantity="PV_L23/4/CELL_PV/v"/>
            <OutputColumn id="v_PV_L23_5_CELL_PV_v" quantity="PV_L23/5/CELL_PV/v"/>
            <OutputColumn id="v_PV_L23_6_CELL_PV_v" quantity="PV_L23/6/CELL_PV/v"/>
        </OutputFile>

        <OutputFile id="Volts_file__SOM_L23" fileName="Sim_M1.SOM_L23.v.dat">
            <OutputColumn id="v_SOM_L23_0_CELL_SOM_v" quantity="SOM_L23/0/CELL_SOM/v"/>
            <OutputColumn id="v_SOM_L23_1_CELL_SOM_v" quantity="SOM_L23/1/CELL_SOM/v"/>
            <OutputColumn id="v_SOM_L23_2_CELL_SOM_v" quantity="SOM_L23/2/CELL_SOM/v"/>
            <OutputColumn id="v_SOM_L23_3_CELL_SOM_v" quantity="SOM_L23/3/CELL_SOM/v"/>
            <OutputColumn id="v_SOM_L23_4_CELL_SOM_v" quantity="SOM_L23/4/CELL_SOM/v"/>
            <OutputColumn id="v_SOM_L23_5_CELL_SOM_v" quantity="SOM_L23/5/CELL_SOM/v"/>
            <OutputColumn id="v_SOM_L23_6_CELL_SOM_v" quantity="SOM_L23/6/CELL_SOM/v"/>
        </OutputFile>

        <OutputFile id="Volts_file__PV_L5" fileName="Sim_M1.PV_L5.v.dat">
            <OutputColumn id="v_PV_L5_0_CELL_PV_v" quantity="PV_L5/0/CELL_PV/v"/>
            <OutputColumn id="v_PV_L5_1_CELL_PV_v" quantity="PV_L5/1/CELL_PV/v"/>
            <OutputColumn id="v_PV_L5_2_CELL_PV_v" quantity="PV_L5/2/CELL_PV/v"/>
            <OutputColumn id="v_PV_L5_3_CELL_PV_v" quantity="PV_L5/3/CELL_PV/v"/>
            <OutputColumn id="v_PV_L5_4_CELL_PV_v" quantity="PV_L5/4/CELL_PV/v"/>
            <OutputColumn id="v_PV_L5_5_CELL_PV_v" quantity="PV_L5/5/CELL_PV/v"/>
            <OutputColumn id="v_PV_L5_6_CELL_PV_v" quantity="PV_L5/6/CELL_PV/v"/>
            <OutputColumn id="v_PV_L5_7_CELL_PV_v" quantity="PV_L5/7/CELL_PV/v"/>
            <OutputColumn id="v_PV_L5_8_CELL_PV_v" quantity="PV_L5/8/CELL_PV/v"/>
            <OutputColumn id="v_PV_L5_9_CELL_PV_v" quantity="PV_L5/9/CELL_PV/v"/>
            <OutputColumn id="v_PV_L5_10_CELL_PV_v" quantity="PV_L5/10/CELL_PV/v"/>
            <OutputColumn id="v_PV_L5_11_CELL_PV_v" quantity="PV_L5/11/CELL_PV/v"/>
            <OutputColumn id="v_PV_L5_12_CELL_PV_v" quantity="PV_L5/12/CELL_PV/v"/>
            <OutputColumn id="v_PV_L5_13_CELL_PV_v" quantity="PV_L5/13/CELL_PV/v"/>
            <OutputColumn id="v_PV_L5_14_CELL_PV_v" quantity="PV_L5/14/CELL_PV/v"/>
        </OutputFile>

        <OutputFile id="Volts_file__SOM_L5" fileName="Sim_M1.SOM_L5.v.dat">
            <OutputColumn id="v_SOM_L5_0_CELL_SOM_v" quantity="SOM_L5/0/CELL_SOM/v"/>
            <OutputColumn id="v_SOM_L5_1_CELL_SOM_v" quantity="SOM_L5/1/CELL_SOM/v"/>
            <OutputColumn id="v_SOM_L5_2_CELL_SOM_v" quantity="SOM_L5/2/CELL_SOM/v"/>
            <OutputColumn id="v_SOM_L5_3_CELL_SOM_v" quantity="SOM_L5/3/CELL_SOM/v"/>
            <OutputColumn id="v_SOM_L5_4_CELL_SOM_v" quantity="SOM_L5/4/CELL_SOM/v"/>
            <OutputColumn id="v_SOM_L5_5_CELL_SOM_v" quantity="SOM_L5/5/CELL_SOM/v"/>
            <OutputColumn id="v_SOM_L5_6_CELL_SOM_v" quantity="SOM_L5/6/CELL_SOM/v"/>
            <OutputColumn id="v_SOM_L5_7_CELL_SOM_v" quantity="SOM_L5/7/CELL_SOM/v"/>
            <OutputColumn id="v_SOM_L5_8_CELL_SOM_v" quantity="SOM_L5/8/CELL_SOM/v"/>
            <OutputColumn id="v_SOM_L5_9_CELL_SOM_v" quantity="SOM_L5/9/CELL_SOM/v"/>
            <OutputColumn id="v_SOM_L5_10_CELL_SOM_v" quantity="SOM_L5/10/CELL_SOM/v"/>
            <OutputColumn id="v_SOM_L5_11_CELL_SOM_v" quantity="SOM_L5/11/CELL_SOM/v"/>
            <OutputColumn id="v_SOM_L5_12_CELL_SOM_v" quantity="SOM_L5/12/CELL_SOM/v"/>
            <OutputColumn id="v_SOM_L5_13_CELL_SOM_v" quantity="SOM_L5/13/CELL_SOM/v"/>
            <OutputColumn id="v_SOM_L5_14_CELL_SOM_v" quantity="SOM_L5/14/CELL_SOM/v"/>
        </OutputFile>

        <OutputFile id="Volts_file__PV_L6" fileName="Sim_M1.PV_L6.v.dat">
            <OutputColumn id="v_PV_L6_0_CELL_PV_v" quantity="PV_L6/0/CELL_PV/v"/>
            <OutputColumn id="v_PV_L6_1_CELL_PV_v" quantity="PV_L6/1/CELL_PV/v"/>
            <OutputColumn id="v_PV_L6_2_CELL_PV_v" quantity="PV_L6/2/CELL_PV/v"/>
            <OutputColumn id="v_PV_L6_3_CELL_PV_v" quantity="PV_L6/3/CELL_PV/v"/>
            <OutputColumn id="v_PV_L6_4_CELL_PV_v" quantity="PV_L6/4/CELL_PV/v"/>
            <OutputColumn id="v_PV_L6_5_CELL_PV_v" quantity="PV_L6/5/CELL_PV/v"/>
            <OutputColumn id="v_PV_L6_6_CELL_PV_v" quantity="PV_L6/6/CELL_PV/v"/>
        </OutputFile>

        <OutputFile id="Volts_file__SOM_L6" fileName="Sim_M1.SOM_L6.v.dat">
            <OutputColumn id="v_SOM_L6_0_CELL_SOM_v" quantity="SOM_L6/0/CELL_SOM/v"/>
            <OutputColumn id="v_SOM_L6_1_CELL_SOM_v" quantity="SOM_L6/1/CELL_SOM/v"/>
            <OutputColumn id="v_SOM_L6_2_CELL_SOM_v" quantity="SOM_L6/2/CELL_SOM/v"/>
            <OutputColumn id="v_SOM_L6_3_CELL_SOM_v" quantity="SOM_L6/3/CELL_SOM/v"/>
            <OutputColumn id="v_SOM_L6_4_CELL_SOM_v" quantity="SOM_L6/4/CELL_SOM/v"/>
            <OutputColumn id="v_SOM_L6_5_CELL_SOM_v" quantity="SOM_L6/5/CELL_SOM/v"/>
            <OutputColumn id="v_SOM_L6_6_CELL_SOM_v" quantity="SOM_L6/6/CELL_SOM/v"/>
        </OutputFile>

    </Simulation>

</Lems>
